<?xml version="1.0"?>
<?xml-stylesheet type="text/xsl" href="http://jsbsim.sourceforge.net/JSBSim.xsl"?>
<fdm_config name="B772" version="2.0" release="ALPHA"
   xmlns:xsi="http://www.w3.org/2001/XMLSchema-instance"
   xsi:noNamespaceSchemaLocation="http://jsbsim.sourceforge.net/JSBSim.xsd">

 <fileheader>
  <author> Aeromatic v 0.95 </author>
  <filecreationdate>2014-07-18</filecreationdate>
  <version>$Revision: 1.15 $</version>
  <description> Models a B772. </description>
 </fileheader>

<!--

-->

 <metrics>
   <wingarea  unit="FT2"> 4605.00 </wingarea>
   <wingspan  unit="FT" >  196.92 </wingspan>
   <wing_incidence>          0.00 </wing_incidence>
   <chord     unit="FT" >   23.21 </chord>
   <htailarea unit="FT2"> 1090.00 </htailarea>
   <htailarm  unit="FT" >   92.84 </htailarm>
   <vtailarea unit="FT2">  573.00 </vtailarea>
   <vtailarm  unit="FT" >   88.24 </vtailarm>
   <location name="AERORP" unit="IN">
     <x> 1151.64 </x> <!-- 25% MAC -->
     <y>   0.00 </y>
     <z>   0.00 </z>
   </location>
   <location name="EYEPOINT" unit="IN">
     <x> 175.63 </x>
     <y> -30.00 </y>
     <z>  70.00 </z>
   </location>
   <location name="VRP" unit="M">
     <x>25.3508</x>
     <y>0</y>
     <z>0.640636</z>
   </location>
 </metrics>

 <mass_balance>
    <ixx unit="SLUG*FT2">   6341762 </ixx>
    <iyy unit="SLUG*FT2">  16026471 </iyy>
    <izz unit="SLUG*FT2">  22466436 </izz>
    <emptywt unit="LBS" >    310400 </emptywt>
    <location name="CG" unit="IN">
      <x> 1151.60 </x>
      <y>   0.00 </y>
      <z> -20.00 </z>
    </location>
    <pointmass name="Payload">
    <description> 67035 LBS + full (150965 LBS) fuel should bring model up to entered max weight</description>
    <weight unit="LBS">  33517.5 </weight>
    <location name="POINTMASS" unit="IN">
      <x> 1151.60 </x>
      <y>   0.00 </y>
      <z> -20.0 </z>
    </location>
    </pointmass>
 </mass_balance>

 <ground_reactions>

  <contact type="BOGEY" name="NOSE">
   <location unit="IN">
     <x> 232.00 </x>
     <y>   0.00 </y>
     <z> -186.94 </z> <!-- top of floor - WL 200.44 -->
   </location>
   <static_friction>  0.80 </static_friction>
   <dynamic_friction> 0.50 </dynamic_friction>
   <rolling_friction> 0.02 </rolling_friction>
   <spring_coeff unit="LBS/FT">      163500.00 </spring_coeff>
   <damping_coeff unit="LBS/FT/SEC"> 272500.00 </damping_coeff>
   <max_steer unit="DEG"> 70.00 </max_steer>
   <brake_group>NONE</brake_group>
   <retractable>1</retractable>
  </contact>

  <contact type="BOGEY" name="LEFT_MAIN">
   <location unit="IN">
     <x> 1251.00 </x>
     <y> -216.0 </y>
     <z> -200.44 </z>
   </location>
   <static_friction>  0.80 </static_friction>
   <dynamic_friction> 0.50 </dynamic_friction>
   <rolling_friction> 0.02 </rolling_friction>
   <spring_coeff unit="LBS/FT">      545000.00 </spring_coeff>
   <damping_coeff unit="LBS/FT/SEC"> 272500.00 </damping_coeff>
   <max_steer unit="DEG">0</max_steer>
   <brake_group>LEFT</brake_group>
   <retractable>1</retractable>
  </contact>

  <contact type="BOGEY" name="RIGHT_MAIN">
   <location unit="IN">
     <x> 1251.00 </x>
     <y> 216.00 </y>
     <z> -200.44 </z>
   </location>
   <static_friction>  0.80 </static_friction>
   <dynamic_friction> 0.50 </dynamic_friction>
   <rolling_friction> 0.02 </rolling_friction>
   <spring_coeff unit="LBS/FT">      545000.00 </spring_coeff>
   <damping_coeff unit="LBS/FT/SEC"> 272500.00 </damping_coeff>
   <max_steer unit="DEG">0</max_steer>
   <brake_group>RIGHT</brake_group>
   <retractable>1</retractable>
  </contact>

  <contact type="BOGEY" name="LEFT_MAIN_AFT">
   <location unit="IN">
     <x> 1309.70 </x> <!-- aft axle position -->
     <y> -216.00 </y>
     <z> -214.00 </z> <!-- this coordinate gives 13 degrees of gear in free condition -->
   </location>
   <static_friction>  0.80 </static_friction>
   <dynamic_friction> 0.50 </dynamic_friction>
   <rolling_friction> 0.02 </rolling_friction>
   <spring_coeff unit="LBS/FT">      100.00 </spring_coeff>
   <damping_coeff unit="LBS/FT/SEC"> 1.00 </damping_coeff>
   <max_steer unit="DEG">0</max_steer>
   <brake_group>NONE</brake_group>
   <retractable>1</retractable>
  </contact>

  <contact type="BOGEY" name="RIGHT_MAIN_AFT">
   <location unit="IN">
     <x> 1309.70 </x> <!-- aft axle position -->
     <y> 216.00 </y>
     <z> -214.00 </z> <!-- this coordinate gives 13 degrees of gear in free condition -->
   </location>
   <static_friction>  0.80 </static_friction>
   <dynamic_friction> 0.50 </dynamic_friction>
   <rolling_friction> 0.02 </rolling_friction>
   <spring_coeff unit="LBS/FT">      100.00 </spring_coeff>
   <damping_coeff unit="LBS/FT/SEC"> 1.00 </damping_coeff>
   <max_steer unit="DEG">0</max_steer>
   <brake_group>NONE</brake_group>
   <retractable>1</retractable>
  </contact>

  <contact type="STRUCTURE" name="LEFT_WING">
    <location unit="IN">
     <x> 1394.92 </x>
     <y> -99.96 </y>
     <z> -62.72 </z>
    </location>
    <static_friction>  1.00 </static_friction>
    <dynamic_friction> 1.00 </dynamic_friction>
    <spring_coeff unit="LBS/FT">      545000.00 </spring_coeff>
    <damping_coeff unit="LBS/FT/SEC"> 545000.00 </damping_coeff>
  </contact>

  <contact type="STRUCTURE" name="RIGHT_WING">
    <location unit="IN">
     <x> 1394.92 </x>
     <y>  99.96 </y>
     <z> -62.72 </z>
    </location>
    <static_friction>  1.00 </static_friction>
    <dynamic_friction> 1.00 </dynamic_friction>
    <spring_coeff unit="LBS/FT">      545000.00 </spring_coeff>
    <damping_coeff unit="LBS/FT/SEC"> 545000.00 </damping_coeff>
  </contact>

 </ground_reactions>

 <propulsion>

   <engine file="ge90_77b">
    <location unit="IN">
      <x> 1394.92 </x>
      <y> -381 </y>
      <z> -100.00 </z>
    </location>
    <orient unit="DEG">
      <pitch> 0.00 </pitch>
      <roll>  0.00 </roll>
      <yaw>   0.00 </yaw>
    </orient>
    <feed>0</feed>
    <thruster file="direct">
     <location unit="IN">
       <x> 1394.92 </x>
       <y> -381 </y>
       <z> -100.00 </z>
     </location>
     <orient unit="DEG">
       <pitch> 0.00 </pitch>
       <roll>  0.00 </roll>
       <yaw>   1.75 </yaw>
     </orient>
    </thruster>
  </engine>

   <engine file="ge90_77b">
    <location unit="IN">
      <x> 1394.92 </x>
      <y> 381 </y>
      <z> -100.00 </z>
    </location>
    <orient unit="DEG">
      <pitch> 0.00 </pitch>
      <roll>  0.00 </roll>
      <yaw>   0.00 </yaw>
    </orient>
    <feed>2</feed>
    <thruster file="direct">
     <location unit="IN">
       <x> 1394.92 </x>
       <y> 381 </y>
       <z> -100.00 </z>
     </location>
     <orient unit="DEG">
       <pitch> 0.00 </pitch>
       <roll>  0.00 </roll>
       <yaw>  -1.75 </yaw>
     </orient>
    </thruster>
  </engine>

  <tank type="FUEL" number="0"> <!-- Left wing tank -->
     <location unit="IN">
       <x> 1151.60 </x>
       <y>   0.00 </y>
       <z> -20.00 </z>
     </location>
     <capacity unit="LBS"> 62300 </capacity>
     <contents unit="LBS"> 25160.83 </contents>
  </tank>

  <tank type="FUEL" number="1"> <!-- Main tank -->
     <location unit="IN">
       <x> 1151.60 </x>
       <y>   0.00 </y>
       <z> -20.00 </z>
     </location>
     <capacity unit="LBS"> 83100 </capacity>
     <contents unit="LBS"> 25160.83 </contents>
  </tank>

  <tank type="FUEL" number="2"> <!-- Right wing tank -->
     <location unit="IN">
       <x> 1151.60 </x>
       <y>   0.00 </y>
       <z> -20.00 </z>
     </location>
     <capacity unit="LBS"> 62300 </capacity>
     <contents unit="LBS"> 25160.83 </contents>
  </tank>

 </propulsion>

 <system file="steering"/>

 <flight_control name="FCS: B772">

  <channel name="Pitch">

   <summer name="Pitch Trim Sum">
      <input>fcs/elevator-cmd-norm</input>
      <!--<input>fcs/pitch-trim-cmd-norm</input>-->
      <clipto>
        <min> -1 </min>
        <max>  1 </max>
      </clipto>
   </summer>

   <aerosurface_scale name="Elevator Control">
      <input>fcs/pitch-trim-sum</input>
      <range>
        <min> -0.610865238 </min>
        <max>  0.436332313 </max>
      </range>
      <output>fcs/elevator-pos-rad</output>
   </aerosurface_scale>

   <aerosurface_scale name="elevator normalization">
      <input>fcs/elevator-pos-rad</input>
      <domain>
        <min> -0.610865238 </min>
        <max>  0.436332313 </max>
      </domain>
      <range>
        <min> -1 </min>
        <max>  1 </max>
      </range>
      <output>fcs/elevator-pos-norm</output>
   </aerosurface_scale>

  </channel>

  <channel name="Roll">

   <summer name="Roll Trim Sum">
      <input>fcs/aileron-cmd-norm</input>
      <input>fcs/roll-trim-cmd-norm</input>
      <clipto>
        <min> -1 </min>
        <max>  1 </max>
      </clipto>
   </summer>

   <aerosurface_scale name="Left Aileron Control">
      <input>fcs/roll-trim-sum</input>
      <range>
        <min> -0.5235987756 </min>
        <max>  0.2617993878 </max>
      </range>
      <output>fcs/left-aileron-pos-rad</output>
   </aerosurface_scale>

   <aerosurface_scale name="Right Aileron Control">
      <input>fcs/roll-trim-sum</input>
      <range>
        <min> -0.2617993878 </min>
        <max>  0.5235987756 </max>
      </range>
      <output>fcs/right-aileron-pos-rad</output>
   </aerosurface_scale>

   <aerosurface_scale name="left aileron normalization">
      <input>fcs/left-aileron-pos-rad</input>
      <domain>
        <min> -0.5235987756 </min>
        <max>  0.2617993878 </max>
      </domain>
      <range>
        <min> -1 </min>
        <max>  1 </max>
      </range>
      <output>fcs/left-aileron-pos-norm</output>
   </aerosurface_scale>

   <aerosurface_scale name="right aileron normalization">
      <input>fcs/right-aileron-pos-rad</input>
      <domain>
        <min> -0.2617993878 </min>
        <max>  0.5235987756 </max>
      </domain>
      <range>
        <min> -1 </min>
        <max>  1 </max>
      </range>
      <output>fcs/right-aileron-pos-norm</output>
   </aerosurface_scale>

  </channel>

  <property value="1">fcs/yaw-damper-enable</property>
  <channel name="Yaw">

   <summer name="Rudder Command Sum">
      <input>fcs/rudder-cmd-norm</input>
      <input>fcs/yaw-trim-cmd-norm</input>
      <clipto>
        <min> -1 </min>
        <max>  1 </max>
      </clipto>
   </summer>

   <scheduled_gain name="Yaw Damper Rate">
      <input>velocities/r-aero-rad_sec</input>
      <table>
        <independentVar lookup="row">velocities/ve-kts</independentVar>
         <tableData>
            30     0.00
            60     2.00
         </tableData>
      </table>
      <gain>fcs/yaw-damper-enable</gain>
   </scheduled_gain>

   <summer name="Rudder Sum">
      <input>fcs/rudder-command-sum</input>
      <input>fcs/yaw-damper-rate</input>
      <clipto>
        <min> -1.0 </min>
        <max>  1.0 </max>
      </clipto>
   </summer>

   <aerosurface_scale name="Rudder Control">
      <input>fcs/rudder-sum</input>
      <domain>
        <min> -1.0 </min>
        <max>  1.0 </max>
      </domain>
      <range>
        <min> -0.4364 </min>
        <max>  0.4364 </max>
      </range>
      <output>fcs/rudder-pos-rad</output>
   </aerosurface_scale>

   <aerosurface_scale name="rudder normalization">
      <input>fcs/rudder-pos-rad</input>
      <domain>
        <min> -0.4364 </min>
        <max>  0.4364 </max>
      </domain>
      <range>
        <min> -1 </min>
        <max>  1 </max>
      </range>
      <output>fcs/rudder-pos-norm</output>
   </aerosurface_scale>

  </channel>

  <channel name="Flaps">
   <kinematic name="Flaps Control">
     <input>fcs/flap-cmd-norm</input>
     <traverse>
       <setting>
          <position>  0 </position>
          <time>      0 </time>
       </setting>
       <setting>
          <position>  1 </position>
          <time>     12 </time>
       </setting>
       <setting>
          <position>  5 </position>
          <time>     11 </time>
       </setting>
       <setting>
          <position> 15 </position>
          <time>      7 </time>
       </setting>
       <setting>
          <position> 20 </position>
          <time>      7 </time>
       </setting>
       <setting>
          <position> 30 </position>
          <time>      20 </time>
       </setting>
     </traverse>
     <output>fcs/flap-pos-deg</output>
   </kinematic>

   <aerosurface_scale name="flap normalization">
      <input>fcs/flap-pos-deg</input>
      <domain>
        <min>  0 </min>
        <max> 30 </max>
      </domain>
      <range>
        <min> 0 </min>
        <max> 1 </max>
      </range>
      <output>fcs/flap-pos-norm</output>
   </aerosurface_scale>

  </channel>

  <channel name="Flaperon">

   <fcs_function name="fcs/flaperon-droop">
     <function>
      <table>
       <independentVar lookup="row"> fcs/flap-pos-deg </independentVar>
       <tableData>
        0   0
        1   0
        5   10
        15  20
        20  20
        25  31
        30  31
       </tableData>
      </table>
     </function>
   </fcs_function>

   <fcs_function name="fcs/flaperon-left">
    <function>
      <sum>
            <property>fcs/flaperon-droop</property>
            <product>
              <property>fcs/roll-trim-sum</property>
              <value>10</value>
            </product>
          </sum>
    </function>
      <clipto>
        <min> -10.0 </min>
        <max>  36.0 </max>
      </clipto>
   </fcs_function>

   <fcs_function name="fcs/flaperon-right">
    <function>
      <sum>
            <property>fcs/flaperon-droop</property>
            <product>
              <property>fcs/roll-trim-sum</property>
              <value>-10</value>
            </product>
          </sum>
    </function>
      <clipto>
        <min> -10.0 </min>
        <max>  36.0 </max>
      </clipto>
   </fcs_function>

  </channel>

  <channel name="Landing Gear">
   <kinematic name="Gear Control">
     <input>gear/gear-cmd-norm</input>
     <traverse>
       <setting>
          <position> 0 </position>
          <time>     0 </time>
       </setting>
       <setting>
          <position> 1 </position>
          <time>    19 </time>
       </setting>
     </traverse>
     <output>gear/gear-pos-norm</output>
   </kinematic>

  </channel>

  <channel name="Speedbrake">
   <kinematic name="Speedbrake Control">
     <input>fcs/speedbrake-cmd-norm</input>
     <traverse>
       <setting>
          <position> 0 </position>
          <time>     0 </time>
       </setting>
       <setting>
          <position> 1 </position>
          <time>     1 </time>
       </setting>
     </traverse>
     <output>fcs/speedbrake-pos-norm</output>
   </kinematic>

  </channel>

  <channel name="calculations">

    <fcs_function name="aero/data/cg">
      <function>
          <description>MAC in percents</description>
          <product>
            <sum>
              <property>inertia/cg-x-in</property>
              <value>-1081.97</value>
            </sum>
            <value>0.003590406</value>
          </product>
      </function>
    </fcs_function>

    <fcs_function name="aero/data/eps">
      <function>
        <sum>
          <product>
            <sum>
              <table>
                <independentVar lookup="row">aero/alpha-rad</independentVar>
                <independentVar lookup="column">fcs/flap-pos-deg</independentVar>
                <tableData>
                          0 1 5 15  20  25  30
                  -0.0698 0.70  0.61  2.11  3.04  4.03  4.35  5.63
                  -0.0524 1.07  1.02  2.50  3.47  4.45  4.74  6.03
                  -0.0349 1.45  1.44  2.88  3.88  4.88  5.12  6.43
                  -0.0175 1.86  1.87  3.32  4.30  5.30  5.51  6.83
                  0.0000  2.27  2.29  3.77  4.75  5.74  5.89  7.22
                  0.0349  3.15  3.16  4.67  5.64  6.60  6.67  8.01
                  0.0698  4.07  4.03  5.57  6.51  7.48  7.44  8.80
                  0.1047  4.99  4.89  6.47  7.37  8.35  8.21  9.60
                  0.1396  5.93  5.75  7.32  8.20  9.16  8.97  10.39
                  0.1745  6.85  6.62  8.12  8.98  9.94  9.72  11.19
                  0.2094  7.98  7.49  8.90  9.73  10.68 10.47 11.98
                  0.2269  8.60  7.94  9.29  10.10 11.05 10.84 12.36
                  0.2443  9.50  8.41  9.66  10.44 11.40 11.19 12.82
                  0.2618  10.55 8.84  10.03 10.76 11.68 11.58 13.30
                  0.2793  11.45 9.23  10.40 11.06 11.96 11.95 13.83
                  0.2967  12.05 9.55  10.75 11.35 12.28 12.33 14.23
                  0.3142  11.36 9.81  11.06 11.60 12.63 12.71 13.61
                  0.3316  9.43  10.01 11.35 12.03 13.20 12.95 12.78
                  0.3491  7.98  10.31 11.97 12.78 13.95 12.46 11.81
                  0.3665  7.33  10.41 12.37 13.40 14.54 11.40 10.60
                  0.3840  7.17  9.00  11.11 13.02 14.40 10.27 9.44
                  0.4014  7.29  7.11  8.46  11.02 12.93 9.67  8.88
                  0.4189  7.63  7.05  8.15  9.07  10.87 9.72  8.88
                  0.4363  7.99  7.61  8.46  8.49  10.47 10.04 9.26
                  0.4538  8.44  8.16  8.81  8.54  10.74 10.46 9.81
                  0.4712  8.71  8.59  9.18  8.79  11.19 10.91 10.37
                  0.4887  9.10  8.99  9.54  9.05  11.63 11.25 10.81
                  0.5061  9.51  9.25  9.83  9.43  12.04 11.54 11.12
                  0.5236  9.82  9.50  10.12 9.77  12.40 11.76 11.39
                  0.5411  10.11 9.74  10.35 10.03 12.73 11.90 11.58
                  0.5585  10.35 9.96  10.57 10.25 12.97 12.01 11.71
                  0.5760  10.56 10.20 10.72 10.39 13.14 12.11 11.83
                  0.5934  10.72 10.41 10.82 10.49 13.24 12.19 11.92
                  0.6109  10.94 10.59 10.90 10.56 13.29 12.26 12.01
                  0.6283  11.18 10.73 10.94 10.61 13.29 12.32 12.11
                </tableData>
              </table>
              <table>
                <independentVar lookup="row">aero/alpha-rad</independentVar>
                <independentVar lookup="column">velocities/mach</independentVar>
                <tableData>
                          0.4 0.6 0.7 0.75  0.8 0.83  0.85  0.87  0.89  0.91  0.94  0.96
                  -0.0698 0.00  -0.04 -0.17 -0.23 -0.39 -0.49 -0.54 -0.76 -1.00 -1.08 -1.02 -0.84
                  -0.0524 0.00  0.04  -0.11 -0.15 -0.28 -0.35 -0.35 -0.47 -0.66 -0.87 -1.00 -0.84
                  -0.0349 0.00  0.11  -0.02 -0.07 -0.15 -0.22 -0.21 -0.28 -0.39 -0.60 -0.89 -0.73
                  -0.0175 0.00  0.15  0.05  0.00  -0.04 -0.10 -0.09 -0.12 -0.20 -0.35 -0.63 -0.48
                  0.0000  0.00  0.19  0.13  0.13  0.09  0.08  0.07  0.04  0.00  -0.10 -0.26 -0.10
                  0.0349  0.00  0.27  0.26  0.28  0.30  0.34  0.37  0.42  0.39  0.35  0.31  0.56
                  0.0698  0.00  0.33  0.41  0.40  0.50  0.75  0.81  0.91  0.96  0.87  0.86  0.97
                  0.1047  0.00  0.39  0.51  0.67  0.79  1.31  1.45  1.54  1.63  1.54  1.54  1.44
                  0.1396  0.00  0.41  0.67  0.98  1.34  1.56  1.66  1.64  1.44  1.33  1.16  1.03
                  0.1745  0.00  0.40  0.33  0.52  1.28  2.14  2.19  2.14  1.91  1.76  1.57  1.41
                  0.2094  0.00  0.44  -0.30 -0.49 -0.27 -0.08 0.17  0.30  0.40  0.58  0.74  0.73
                  0.2269  0.00  0.19  -0.12 -0.32 -0.37 -0.32 -0.23 -0.04 0.20  0.41  0.56  0.50
                  0.2443  0.00  -0.37 -0.51 -0.67 -0.76 -0.74 -0.63 -0.38 -0.12 0.01  0.06  0.01
                </tableData>
              </table>
            </sum>
            <difference>
              <value>1</value>
              <table>
                <independentVar lookup="row">aero/h_b-mac-ft</independentVar>
                <tableData>
                  0.040 1.05
                  0.088 1.00
                  0.110 0.96
                  0.150 0.79
                  0.200 0.55
                  0.250 0.41
                  0.300 0.30
                  0.350 0.23
                  0.400 0.18
                  0.450 0.15
                  0.500 0.12
                  0.600 0.07
                  0.800 0.03
                  1.000 0.00
                </tableData>
              </table>
            </difference>
          </product>
          <product>
            <table>
              <independentVar lookup="row">aero/alpha-rad</independentVar>
              <independentVar lookup="column">fcs/flap-pos-deg</independentVar>
              <tableData>
                        0 1 5 15  20  25  30
                -0.0698 1.63  1.68  1.97  2.09  2.26  2.57  2.93
                -0.0524 1.82  1.85  2.07  2.16  2.29  2.55  2.84
                -0.0349 1.99  2.02  2.17  2.23  2.30  2.50  2.72
                -0.0175 2.18  2.19  2.27  2.29  2.31  2.44  2.58
                0.0000  2.36  2.36  2.36  2.34  2.31  2.37  2.44
                0.0349  2.68  2.66  2.51  2.40  2.26  2.20  2.13
                0.0698  2.91  2.88  2.57  2.38  2.12  1.94  1.73
                0.1047  2.92  2.86  2.40  2.17  1.87  1.62  1.33
                0.1396  2.80  2.75  2.10  1.83  1.48  1.27  1.05
                0.1745  2.97  2.90  2.17  1.86  1.44  1.26  1.05
                0.2094  3.58  3.20  2.51  2.17  1.70  1.49  1.25
                0.2269  3.65  3.26  2.56  2.24  1.81  1.59  1.33
                0.2443  3.67  3.28  2.57  2.27  1.87  1.65  1.40
              </tableData>
            </table>
            <table>
              <independentVar lookup="row">aero/h_b-mac-ft</independentVar>
              <tableData>
                0.040 1.05
                0.088 1.00
                0.110 0.96
                0.150 0.79
                0.200 0.55
                0.250 0.41
                0.300 0.30
                0.350 0.23
                0.400 0.18
                0.450 0.15
                0.500 0.12
                0.600 0.07
                0.800 0.03
                1.000 0.00
              </tableData>
            </table>
          </product>
        </sum>
      </function>
    </fcs_function>

    <fcs_function name="aero/data/alh">
      <function>
        <sum>
          <property>aero/alpha-deg</property>
          <product>
            <property>aero/data/eps</property>
            <value>-1</value>
          </product>
          <property>fcs/stab</property>
        </sum>
      </function>
    </fcs_function>

    <fcs_function name="aero/data/clstab">
      <function>
        <table>
          <independentVar lookup="row">aero/data/alh</independentVar>
          <independentVar lookup="column">velocities/mach</independentVar>
          <tableData>
                0.4 0.6 0.7 0.75  0.8 0.83  0.85  0.87  0.89  0.91  0.94  0.96
            -22 -1.06 -1.06 -1.06 -1.06 -1.06 -1.06 -1.06 -1.06 -1.06 -1.06 -1.06 -1.06
            -21 -1.04 -1.04 -1.04 -1.04 -1.04 -1.04 -1.04 -1.04 -1.04 -1.04 -1.04 -1.04
            -20 -1.05 -1.05 -1.05 -1.05 -1.05 -1.05 -1.05 -1.05 -1.05 -1.05 -1.05 -1.05
            -19 -1.10 -1.10 -1.10 -1.10 -1.10 -1.10 -1.10 -1.10 -1.10 -1.10 -1.10 -1.10
            -18 -1.07 -1.07 -1.07 -1.07 -1.07 -1.07 -1.07 -1.07 -1.07 -1.07 -1.07 -1.07
            -17 -1.02 -1.02 -1.02 -1.02 -1.02 -1.02 -1.02 -1.02 -1.02 -1.02 -1.02 -1.02
            -16 -0.96 -0.96 -0.96 -0.96 -0.96 -0.96 -0.96 -0.96 -0.96 -0.96 -0.96 -0.96
            -14 -0.85 -0.85 -0.85 -0.85 -0.85 -0.85 -0.85 -0.85 -0.85 -0.85 -0.85 -0.85
            -12 -0.73 -0.79 -0.76 -0.71 -0.71 -0.75 -0.77 -0.74 -0.73 -0.74 -0.75 -0.75
            -10 -0.61 -0.66 -0.68 -0.66 -0.67 -0.70 -0.71 -0.69 -0.68 -0.69 -0.69 -0.70
            -8  -0.49 -0.53 -0.56 -0.57 -0.60 -0.61 -0.61 -0.60 -0.60 -0.60 -0.60 -0.60
            -4  -0.24 -0.27 -0.28 -0.29 -0.30 -0.32 -0.33 -0.34 -0.35 -0.35 -0.33 -0.31
            0   0.00  0.00  0.00  0.00  0.00  0.00  0.00  0.00  0.00  0.00  0.00  0.00
            4   0.25  0.27  0.28  0.29  0.30  0.32  0.33  0.34  0.35  0.35  0.33  0.31
            8   0.49  0.53  0.56  0.57  0.60  0.61  0.61  0.60  0.60  0.60  0.60  0.60
            10  0.61  0.61  0.61  0.61  0.61  0.61  0.61  0.61  0.61  0.61  0.61  0.61
            12  0.74  0.74  0.74  0.74  0.74  0.74  0.74  0.74  0.74  0.74  0.74  0.74
            14  0.85  0.85  0.85  0.85  0.85  0.85  0.85  0.85  0.85  0.85  0.85  0.85
            16  0.95  0.95  0.95  0.95  0.95  0.95  0.95  0.95  0.95  0.95  0.95  0.95
            17  0.99  0.99  0.99  0.99  0.99  0.99  0.99  0.99  0.99  0.99  0.99  0.99
            18  1.04  1.04  1.04  1.04  1.04  1.04  1.04  1.04  1.04  1.04  1.04  1.04
            19  1.08  1.08  1.08  1.08  1.08  1.08  1.08  1.08  1.08  1.08  1.08  1.08
            20  1.12  1.12  1.12  1.12  1.12  1.12  1.12  1.12  1.12  1.12  1.12  1.12
            21  1.15  1.15  1.15  1.15  1.15  1.15  1.15  1.15  1.15  1.15  1.15  1.15
            22  1.19  1.19  1.19  1.19  1.19  1.19  1.19  1.19  1.19  1.19  1.19  1.19
            23  1.21  1.21  1.21  1.21  1.21  1.21  1.21  1.21  1.21  1.21  1.21  1.21
            24  1.24  1.24  1.24  1.24  1.24  1.24  1.24  1.24  1.24  1.24  1.24  1.24
            25  1.26  1.26  1.26  1.26  1.26  1.26  1.26  1.26  1.26  1.26  1.26  1.26
            26  1.28  1.28  1.28  1.28  1.28  1.28  1.28  1.28  1.28  1.28  1.28  1.28
            27  1.30  1.30  1.30  1.30  1.30  1.30  1.30  1.30  1.30  1.30  1.30  1.30
            28  1.32  1.32  1.32  1.32  1.32  1.32  1.32  1.32  1.32  1.32  1.32  1.32
          </tableData>
        </table>
      </function>
    </fcs_function>

    <fcs_function name="aero/data/clelev">
      <function>
        <table>
          <independentVar lookup="row">aero/data/alh</independentVar>
          <independentVar lookup="column">fcs/elevator-pos-deg</independentVar>
          <independentVar lookup="table">velocities/mach</independentVar>
          <tableData breakPoint="0.26">
                -35 -25 -15 -5  0 5 15  25
            -22 -0.275  -0.265  -0.203  -0.090  0.000 0.106 0.325 0.591
            -20 -0.311  -0.289  -0.208  -0.081  0.000 0.112 0.386 0.689
            -18 -0.290  -0.285  -0.243  -0.124  0.000 0.146 0.510 0.818
            -16 -0.552  -0.522  -0.379  -0.145  0.000 0.165 0.527 0.857
            -14 -0.637  -0.596  -0.418  -0.157  0.000 0.170 0.532 0.868
            -6  -0.787  -0.716  -0.497  -0.178  0.000 0.177 0.547 0.857
            -4  -0.822  -0.746  -0.514  -0.179  0.000 0.176 0.541 0.829
            -2  -0.858  -0.775  -0.530  -0.180  0.000 0.175 0.538 0.802
            2 -0.925  -0.833  -0.556  -0.181  0.000 0.172 0.529 0.749
            6 -0.968  -0.873  -0.579  -0.182  0.000 0.169 0.506 0.695
            10  -0.978  -0.882  -0.585  -0.184  0.000 0.163 0.478 0.642
            14  -0.967  -0.869  -0.572  -0.182  0.000 0.152 0.429 0.581
            16  -0.952  -0.848  -0.555  -0.173  0.000 0.143 0.402 0.539
            20  -0.883  -0.773  -0.494  -0.150  0.000 0.119 0.321 0.408
            24  -0.788  -0.672  -0.407  -0.120  0.000 0.104 0.267 0.330
            26  -0.769  -0.643  -0.384  -0.118  0.000 0.104 0.264 0.324
          </tableData>
          <tableData breakPoint="0.4">
              -35 -25 -15 -5  0 5 15  25
            -22 -0.267  -0.251  -0.191  -0.081  0.000 0.102 0.322 0.577
            -20 -0.298  -0.281  -0.196  -0.077  0.000 0.110 0.384 0.668
            -18 -0.281  -0.273  -0.228  -0.120  0.000 0.145 0.499 0.797
            -16 -0.543  -0.514  -0.364  -0.143  0.000 0.166 0.524 0.826
            -14 -0.622  -0.588  -0.409  -0.156  0.000 0.171 0.530 0.851
            -6  -0.769  -0.708  -0.493  -0.179  0.000 0.177 0.548 0.857
            -4  -0.802  -0.738  -0.510  -0.180  0.000 0.177 0.550 0.836
            -2  -0.839  -0.767  -0.525  -0.181  0.000 0.176 0.550 0.811
            2 -0.914  -0.823  -0.545  -0.181  0.000 0.174 0.537 0.755
            6 -0.962  -0.854  -0.553  -0.183  0.000 0.171 0.513 0.698
            10  -0.971  -0.861  -0.554  -0.185  0.000 0.164 0.483 0.645
            14  -0.958  -0.839  -0.541  -0.182  0.000 0.153 0.434 0.584
            16  -0.943  -0.818  -0.528  -0.173  0.000 0.143 0.407 0.541
            20  -0.876  -0.745  -0.461  -0.147  0.000 0.122 0.326 0.410
            24  -0.780  -0.644  -0.383  -0.118  0.000 0.104 0.272 0.332
            26  -0.762  -0.618  -0.364  -0.112  0.000 0.100 0.269 0.327
          </tableData>
          <tableData breakPoint="0.6">
              -30 -20 -15 -10 -5  0 5 10  15  20  25
            -12 -0.723  -0.602  -0.486  -0.337  -0.176  0.000 0.181 0.377 0.548 0.718 0.810
            -10 -0.754  -0.624  -0.501  -0.348  -0.180  0.000 0.185 0.382 0.572 0.742 0.832
            -8  -0.783  -0.644  -0.517  -0.359  -0.184  0.000 0.188 0.385 0.574 0.746 0.835
            -6  -0.812  -0.664  -0.532  -0.369  -0.188  0.000 0.190 0.385 0.574 0.746 0.833
            -5  -0.825  -0.674  -0.539  -0.373  -0.190  0.000 0.191 0.385 0.573 0.745 0.829
            -4  -0.838  -0.684  -0.546  -0.377  -0.192  0.000 0.191 0.385 0.572 0.742 0.824
            -3  -0.850  -0.694  -0.553  -0.381  -0.194  0.000 0.191 0.384 0.571 0.734 0.816
            -2  -0.862  -0.703  -0.560  -0.385  -0.196  0.000 0.191 0.383 0.569 0.726 0.807
            -1  -0.871  -0.711  -0.565  -0.387  -0.197  0.000 0.191 0.382 0.567 0.717 0.798
            0 -0.880  -0.718  -0.572  -0.390  -0.199  0.000 0.191 0.380 0.562 0.707 0.788
            1 -0.889  -0.724  -0.577  -0.391  -0.200  0.000 0.190 0.379 0.558 0.697 0.776
            2 -0.892  -0.727  -0.581  -0.393  -0.201  0.000 0.190 0.377 0.552 0.687 0.763
            3 -0.894  -0.730  -0.581  -0.393  -0.202  0.000 0.189 0.374 0.545 0.676 0.751
            4 -0.894  -0.731  -0.581  -0.393  -0.202  0.000 0.189 0.372 0.539 0.666 0.738
            6 -0.893  -0.732  -0.579  -0.393  -0.203  0.000 0.187 0.365 0.526 0.644 0.713
            8 -0.881  -0.710  -0.565  -0.393  -0.204  0.000 0.186 0.359 0.511 0.623 0.685
          </tableData>
          <tableData breakPoint="0.7">
              -30 -20 -15 -10 -5  0 5 10  15  20  25
            -12 -0.746  -0.632  -0.519  -0.357  -0.183  0.000 0.189 0.379 0.508 0.650 0.692
            -10 -0.779  -0.653  -0.536  -0.369  -0.188  0.000 0.194 0.395 0.549 0.698 0.753
            -8  -0.807  -0.671  -0.554  -0.381  -0.192  0.000 0.197 0.412 0.585 0.747 0.803
            -6  -0.835  -0.689  -0.571  -0.392  -0.197  0.000 0.200 0.414 0.601 0.748 0.825
            -5  -0.848  -0.698  -0.579  -0.397  -0.199  0.000 0.200 0.414 0.604 0.747 0.825
            -4  -0.859  -0.707  -0.586  -0.402  -0.201  0.000 0.201 0.414 0.604 0.745 0.823
            -3  -0.870  -0.716  -0.593  -0.406  -0.203  0.000 0.200 0.413 0.602 0.740 0.820
            -2  -0.879  -0.725  -0.599  -0.409  -0.205  0.000 0.200 0.411 0.600 0.735 0.816
            -1  -0.889  -0.733  -0.604  -0.412  -0.206  0.000 0.200 0.409 0.595 0.729 0.811
            0 -0.897  -0.741  -0.610  -0.414  -0.208  0.000 0.200 0.407 0.589 0.721 0.805
            1 -0.904  -0.748  -0.613  -0.415  -0.209  0.000 0.199 0.403 0.581 0.711 0.797
            2 -0.909  -0.752  -0.614  -0.416  -0.210  0.000 0.198 0.399 0.572 0.702 0.786
            3 -0.910  -0.753  -0.613  -0.416  -0.211  0.000 0.197 0.395 0.563 0.692 0.776
            4 -0.909  -0.754  -0.612  -0.416  -0.211  0.000 0.196 0.391 0.555 0.680 0.763
            6 -0.896  -0.750  -0.611  -0.415  -0.212  0.000 0.194 0.382 0.538 0.656 0.737
            8 -0.870  -0.728  -0.594  -0.414  -0.212  0.000 0.192 0.373 0.520 0.634 0.710
          </tableData>
          <tableData breakPoint="0.75">
              -30 -20 -15 -10 -5  0 5 10  15  20  25
            -12 -0.770  -0.643  -0.532  -0.376  -0.193  0.000 0.188 0.383 0.510 0.611 0.652
            -10 -0.798  -0.661  -0.550  -0.389  -0.197  0.000 0.197 0.403 0.556 0.660 0.714
            -8  -0.825  -0.678  -0.567  -0.402  -0.201  0.000 0.203 0.421 0.587 0.718 0.787
            -6  -0.851  -0.695  -0.584  -0.412  -0.205  0.000 0.206 0.426 0.608 0.735 0.816
            -5  -0.861  -0.703  -0.591  -0.417  -0.207  0.000 0.207 0.426 0.612 0.739 0.822
            -4  -0.872  -0.711  -0.598  -0.422  -0.209  0.000 0.207 0.425 0.613 0.739 0.822
            -3  -0.881  -0.719  -0.603  -0.426  -0.211  0.000 0.207 0.423 0.612 0.738 0.821
            -2  -0.890  -0.727  -0.607  -0.429  -0.213  0.000 0.207 0.421 0.609 0.735 0.819
            -1  -0.898  -0.733  -0.612  -0.432  -0.215  0.000 0.207 0.419 0.603 0.729 0.816
            0 -0.905  -0.741  -0.616  -0.433  -0.217  0.000 0.206 0.416 0.596 0.723 0.810
            1 -0.910  -0.748  -0.620  -0.434  -0.218  0.000 0.205 0.413 0.589 0.715 0.801
            2 -0.913  -0.753  -0.620  -0.434  -0.219  0.000 0.204 0.409 0.582 0.706 0.790
            3 -0.914  -0.757  -0.620  -0.434  -0.221  0.000 0.202 0.404 0.572 0.694 0.778
            4 -0.911  -0.756  -0.619  -0.434  -0.222  0.000 0.200 0.399 0.563 0.681 0.767
            6 -0.895  -0.746  -0.616  -0.433  -0.223  0.000 0.197 0.389 0.544 0.657 0.742
            8 -0.865  -0.722  -0.601  -0.431  -0.224  0.000 0.193 0.377 0.526  0.631 0.716
          </tableData>
          <tableData breakPoint="0.8">
              -30 -20 -15 -10 -5  0 5 10  15  20  25
            -12 -0.762  -0.653  -0.551  -0.389  -0.202  0.000 0.191 0.386 0.464 0.545 0.594
            -10 -0.788  -0.668  -0.567  -0.401  -0.207  0.000 0.201 0.409 0.508 0.604 0.677
            -8  -0.815  -0.683  -0.583  -0.414  -0.211  0.000 0.208 0.430 0.550 0.664 0.748
            -6  -0.842  -0.698  -0.598  -0.425  -0.216  0.000 0.213 0.437 0.577 0.691 0.776
            -5  -0.853  -0.706  -0.605  -0.430  -0.217  0.000 0.214 0.437 0.584 0.696 0.779
            -4  -0.864  -0.713  -0.612  -0.435  -0.219  0.000 0.215 0.437 0.586 0.697 0.780
            -3  -0.875  -0.721  -0.618  -0.439  -0.221  0.000 0.215 0.436 0.585 0.696 0.779
            -2  -0.884  -0.729  -0.624  -0.443  -0.223  0.000 0.215 0.434 0.583 0.694 0.777
            -1  -0.892  -0.735  -0.629  -0.445  -0.224  0.000 0.215 0.432 0.581 0.692 0.775
            0 -0.899  -0.742  -0.632  -0.447  -0.226  0.000 0.214 0.429 0.578 0.688 0.771
            1 -0.907  -0.747  -0.638  -0.448  -0.228  0.000 0.213 0.426 0.572 0.682 0.766
            2 -0.912  -0.749  -0.638  -0.449  -0.229  0.000 0.212 0.423 0.567 0.675 0.758
            3 -0.913  -0.749  -0.637  -0.449  -0.230  0.000 0.210 0.419 0.560 0.668 0.749
            4 -0.910  -0.745  -0.634  -0.448  -0.231  0.000 0.208 0.414 0.553 0.660 0.739
            6 -0.887  -0.732  -0.624  -0.446  -0.231  0.000 0.204 0.403 0.538 0.640 0.718
            8 -0.855  -0.712  -0.597  -0.444  -0.232  0.000 0.200 0.393 0.522 0.620 0.696
          </tableData>
          <tableData breakPoint="0.83">
              -30 -20 -15 -10 -5  0 5 10  15  20  25
            -12 -0.809  -0.665  -0.580  -0.411  -0.211  0.000 0.195 0.388 0.488 0.551 0.597
            -10 -0.831  -0.687  -0.596  -0.424  -0.215  0.000 0.212 0.414 0.534 0.618 0.688
            -8  -0.852  -0.708  -0.611  -0.436  -0.220  0.000 0.220 0.436 0.579 0.681 0.756
            -6  -0.872  -0.731  -0.627  -0.447  -0.223  0.000 0.224 0.446 0.598 0.713 0.800
            -5  -0.882  -0.741  -0.634  -0.451  -0.225  0.000 0.225 0.447 0.599 0.715 0.804
            -4  -0.892  -0.750  -0.640  -0.456  -0.227  0.000 0.225 0.447 0.598 0.713 0.805
            -3  -0.902  -0.758  -0.646  -0.461  -0.229  0.000 0.225 0.446 0.597 0.712 0.804
            -2  -0.912  -0.766  -0.650  -0.464  -0.230  0.000 0.225 0.445 0.595 0.708 0.801
            -1  -0.920  -0.772  -0.655  -0.466  -0.232  0.000 0.224 0.443 0.591 0.704 0.798
            0 -0.925  -0.774  -0.658  -0.466  -0.233  0.000 0.223 0.441 0.585 0.698 0.792
            1 -0.930  -0.777  -0.657  -0.466  -0.235  0.000 0.222 0.437 0.580 0.693 0.784
            2 -0.928  -0.776  -0.655  -0.466  -0.236  0.000 0.220 0.434 0.574 0.685 0.775
            3 -0.922  -0.771  -0.652  -0.466  -0.236  0.000 0.219 0.430 0.568 0.677 0.765
            4 -0.916  -0.769  -0.647  -0.464  -0.237  0.000 0.217 0.425 0.561 0.668 0.755
            6 -0.890  -0.751  -0.634  -0.461  -0.237  0.000 0.212 0.416 0.549 0.648 0.734
            8 -0.855  -0.725  -0.608  -0.457  -0.238  0.000 0.207 0.406 0.535 0.627 0.704
          </tableData>
          <tableData breakPoint="0.85">
              -30 -20 -15 -10 -5  0 5 10  15  20  25
            -12 -0.808  -0.671  -0.581  -0.414  -0.214  0.000 0.200 0.390 0.488 0.561 0.634
            -10 -0.831  -0.691  -0.597  -0.428  -0.220  0.000 0.218 0.417 0.533 0.612 0.699
            -8  -0.853  -0.713  -0.614  -0.440  -0.225  0.000 0.229 0.438 0.568 0.669 0.756
            -6  -0.874  -0.735  -0.629  -0.453  -0.230  0.000 0.235 0.448 0.597 0.700 0.789
            -5  -0.884  -0.746  -0.636  -0.458  -0.232  0.000 0.236 0.448 0.598 0.703 0.795
            -4  -0.895  -0.755  -0.642  -0.463  -0.234  0.000 0.236 0.449 0.598 0.703 0.798
            -3  -0.906  -0.764  -0.648  -0.467  -0.236  0.000 0.236 0.448 0.597 0.702 0.798
            -2  -0.916  -0.771  -0.653  -0.470  -0.238  0.000 0.235 0.447 0.596 0.700 0.795
            -1  -0.924  -0.779  -0.657  -0.473  -0.240  0.000 0.234 0.446 0.593 0.696 0.791
            0 -0.930  -0.785  -0.661  -0.473  -0.242  0.000 0.232 0.444 0.590 0.693 0.785
            1 -0.931  -0.790  -0.663  -0.473  -0.243  0.000 0.231 0.442 0.586 0.687 0.777
            2 -0.928  -0.788  -0.660  -0.472  -0.244  0.000 0.229 0.439 0.582 0.680 0.769
            3 -0.923  -0.783  -0.655  -0.471  -0.245  0.000 0.227 0.435 0.577 0.672 0.759
            4 -0.912  -0.777  -0.647  -0.470  -0.245  0.000 0.224 0.431 0.572 0.665 0.749
            6 -0.886  -0.751  -0.631  -0.466  -0.245  0.000 0.219 0.422 0.561 0.644 0.728
            8 -0.847  -0.717  -0.601  -0.461  -0.246  0.000 0.214 0.412 0.548 0.634 0.699
          </tableData>
          <tableData breakPoint="0.87">
              -30 -20 -15 -10 -5  0 5 10  15  20  25
            -12 -0.774  -0.656  -0.572  -0.417  -0.221  0.000 0.202 0.370 0.475 0.556 0.623
            -10 -0.804  -0.677  -0.588  -0.430  -0.227  0.000 0.217 0.401 0.508 0.608 0.675
            -8  -0.831  -0.700  -0.605  -0.443  -0.232  0.000 0.230 0.423 0.538 0.646 0.719
            -6  -0.857  -0.722  -0.621  -0.455  -0.237  0.000 0.237 0.438 0.566 0.673 0.741
            -5  -0.869  -0.733  -0.629  -0.461  -0.240  0.000 0.239 0.440 0.569 0.675 0.744
            -4  -0.880  -0.744  -0.637  -0.466  -0.242  0.000 0.240 0.440 0.572 0.676 0.746
            -3  -0.890  -0.755  -0.644  -0.469  -0.244  0.000 0.240 0.439 0.571 0.677 0.744
            -2  -0.901  -0.764  -0.649  -0.472  -0.246  0.000 0.240 0.438 0.570 0.676 0.742
            -1  -0.915  -0.772  -0.654  -0.474  -0.247  0.000 0.239 0.437 0.568 0.672 0.740
            0 -0.922  -0.777  -0.658  -0.475  -0.249  0.000 0.238 0.435 0.566 0.668 0.736
            1 -0.927  -0.779  -0.660  -0.475  -0.250  0.000 0.236 0.432 0.563 0.663 0.730
            2 -0.926  -0.776  -0.658  -0.474  -0.251  0.000 0.234 0.428 0.559 0.657 0.724
            3 -0.920  -0.765  -0.653  -0.473  -0.251  0.000 0.232 0.424 0.553 0.650 0.717
            4 -0.913  -0.753  -0.645  -0.471  -0.252  0.000 0.229 0.420 0.548 0.641 0.710
            6 -0.881  -0.725  -0.626  -0.467  -0.252  0.000 0.224 0.411 0.536 0.623 0.696
            8 -0.836  -0.683  -0.597  -0.463  -0.252  0.000 0.219 0.401 0.522 0.603 0.681
          </tableData>
          <tableData breakPoint="0.89">
              -30 -20 -15 -10 -5  0 5 10  15  20  25
            -12 -0.737  -0.628  -0.560  -0.412  -0.220  0.000 0.200 0.372 0.467 0.551 0.608
            -10 -0.778  -0.653  -0.578  -0.427  -0.225  0.000 0.215 0.403 0.497 0.592 0.647
            -8  -0.814  -0.681  -0.597  -0.440  -0.231  0.000 0.229 0.425 0.530 0.623 0.681
            -6  -0.848  -0.706  -0.615  -0.454  -0.236  0.000 0.237 0.440 0.557 0.651 0.709
            -5  -0.863  -0.718  -0.624  -0.461  -0.238  0.000 0.238 0.442 0.560 0.653 0.710
            -4  -0.878  -0.730  -0.633  -0.466  -0.241  0.000 0.239 0.442 0.566 0.653 0.710
            -3  -0.891  -0.742  -0.642  -0.471  -0.243  0.000 0.239 0.443 0.561 0.652 0.709
            -2  -0.903  -0.751  -0.649  -0.475  -0.246  0.000 0.239 0.442 0.560 0.648 0.707
            -1  -0.909  -0.757  -0.652  -0.478  -0.248  0.000 0.238 0.441 0.559 0.645 0.705
            0 -0.911  -0.760  -0.656  -0.479  -0.250  0.000 0.237 0.439 0.557 0.639 0.703
            1 -0.911  -0.760  -0.659  -0.479  -0.252  0.000 0.235 0.437 0.554 0.634 0.699
            2 -0.909  -0.759  -0.657  -0.478  -0.253  0.000 0.233 0.434 0.549 0.629 0.695
            3 -0.904  -0.753  -0.651  -0.476  -0.254  0.000 0.231 0.430 0.545 0.622 0.691
            4 -0.894  -0.744  -0.643  -0.473  -0.254  0.000 0.229 0.427 0.540 0.616 0.685
            6 -0.860  -0.718  -0.623  -0.468  -0.254  0.000 0.224 0.417 0.529 0.604 0.670
            8 -0.823  -0.683  -0.591  -0.461  -0.254  0.000 0.219 0.405 0.517 0.590 0.652
          </tableData>
          <tableData breakPoint="0.91">
              -30 -20 -15 -10 -5  0 5 10  15  20  25
            -12 -0.670  -0.587  -0.530  -0.399  -0.212  0.000 0.194 0.341 0.444 0.523 0.571
            -10 -0.704  -0.611  -0.552  -0.414  -0.218  0.000 0.209 0.384 0.481 0.559 0.613
            -8  -0.738  -0.638  -0.574  -0.428  -0.224  0.000 0.221 0.406 0.513 0.595 0.655
            -6  -0.772  -0.665  -0.596  -0.442  -0.230  0.000 0.230 0.421 0.538 0.625 0.684
            -5  -0.787  -0.678  -0.606  -0.449  -0.234  0.000 0.232 0.424 0.539 0.628 0.684
            -4  -0.803  -0.691  -0.617  -0.455  -0.237  0.000 0.233 0.426 0.545 0.628 0.685
            -3  -0.818  -0.704  -0.628  -0.461  -0.240  0.000 0.233 0.426 0.540 0.626 0.684
            -2  -0.834  -0.717  -0.636  -0.466  -0.242  0.000 0.232 0.425 0.538 0.623 0.684
            -1  -0.848  -0.725  -0.639  -0.469  -0.245  0.000 0.231 0.425 0.536 0.619 0.681
            0 -0.855  -0.735  -0.644  -0.472  -0.247  0.000 0.230 0.423 0.534 0.614 0.678
            1 -0.860  -0.740  -0.647  -0.472  -0.248  0.000 0.228 0.421 0.530 0.610 0.674
            2 -0.858  -0.740  -0.644  -0.471  -0.249  0.000 0.227 0.417 0.526 0.605 0.670
            3 -0.855  -0.736  -0.639  -0.469  -0.250  0.000 0.224 0.413 0.521 0.600 0.666
            4 -0.844  -0.721  -0.631  -0.466  -0.250  0.000 0.222 0.409 0.517 0.593 0.662
            6 -0.810  -0.686  -0.609  -0.460  -0.249  0.000 0.218 0.400 0.506 0.580 0.651
            8 -0.775  -0.644  -0.575  -0.453  -0.248  0.000 0.214 0.390 0.495 0.565 0.636
          </tableData>
          <tableData breakPoint="0.94">
              -30 -20 -15 -10 -5  0 5 10  15  20  25
            -12 -0.607  -0.531  -0.470  -0.350  -0.210  0.000 0.192 0.295 0.377 0.447 0.494
            -10 -0.646  -0.558  -0.494  -0.368  -0.217  0.000 0.207 0.349 0.418 0.486 0.540
            -8  -0.685  -0.585  -0.518  -0.386  -0.223  0.000 0.219 0.374 0.452 0.522 0.574
            -6  -0.722  -0.612  -0.541  -0.403  -0.228  0.000 0.228 0.392 0.479 0.545 0.598
            -5  -0.739  -0.624  -0.552  -0.412  -0.231  0.000 0.230 0.393 0.481 0.547 0.601
            -4  -0.755  -0.637  -0.563  -0.420  -0.233  0.000 0.230 0.394 0.483 0.548 0.603
            -3  -0.770  -0.650  -0.574  -0.427  -0.235  0.000 0.230 0.394 0.481 0.548 0.602
            -2  -0.782  -0.661  -0.582  -0.433  -0.238  0.000 0.230 0.393 0.480 0.547 0.600
            -1  -0.794  -0.667  -0.590  -0.439  -0.240  0.000 0.229 0.393 0.478 0.544 0.596
            0 -0.800  -0.670  -0.595  -0.442  -0.242  0.000 0.228 0.392 0.476 0.541 0.592
            1 -0.800  -0.672  -0.596  -0.444  -0.243  0.000 0.226 0.390 0.472 0.538 0.588
            2 -0.799  -0.671  -0.591  -0.443  -0.244  0.000 0.225 0.387 0.468 0.534 0.584
            3 -0.792  -0.665  -0.582  -0.440  -0.244  0.000 0.223 0.384 0.464 0.529 0.579
            4 -0.779  -0.656  -0.573  -0.437  -0.244  0.000 0.221 0.380 0.459 0.524 0.574
            6 -0.741  -0.628  -0.551  -0.430  -0.244  0.000 0.216 0.372 0.449 0.513 0.563
            8 -0.695  -0.584  -0.516  -0.422  -0.243  0.000 0.212 0.362 0.439 0.503 0.553
          </tableData>
          <tableData breakPoint="0.96">
              -30 -20 -15 -10 -5  0 5 10  15  20  25
            -12 -0.573  -0.480  -0.444  -0.328  -0.209  0.000 0.191 0.264 0.350 0.414 0.461
            -10 -0.607  -0.504  -0.465  -0.344  -0.214  0.000 0.206 0.311 0.379 0.447 0.492
            -8  -0.640  -0.529  -0.484  -0.360  -0.219  0.000 0.217 0.341 0.408 0.470 0.517
            -6  -0.674  -0.554  -0.502  -0.376  -0.224  0.000 0.223 0.361 0.435 0.485 0.535
            -5  -0.690  -0.565  -0.511  -0.383  -0.226  0.000 0.225 0.362 0.438 0.489 0.537
            -4  -0.707  -0.576  -0.519  -0.390  -0.228  0.000 0.226 0.363 0.439 0.490 0.539
            -3  -0.718  -0.587  -0.527  -0.397  -0.231  0.000 0.226 0.364 0.438 0.490 0.539
            -2  -0.731  -0.598  -0.535  -0.404  -0.233  0.000 0.226 0.363 0.436 0.489 0.538
            -1  -0.739  -0.606  -0.542  -0.410  -0.235  0.000 0.225 0.362 0.433 0.487 0.536
            0 -0.743  -0.610  -0.546  -0.413  -0.236  0.000 0.224 0.361 0.430 0.484 0.534
            1 -0.741  -0.612  -0.546  -0.413  -0.237  0.000 0.223 0.360 0.427 0.482 0.532
            2 -0.738  -0.612  -0.543  -0.412  -0.238  0.000 0.222 0.358 0.424 0.479 0.529
            3 -0.731  -0.607  -0.539  -0.411  -0.238  0.000 0.220 0.355 0.421 0.477 0.528
            4 -0.721  -0.598  -0.531  -0.408  -0.239  0.000 0.218 0.352 0.418 0.474 0.525
            6 -0.684  -0.565  -0.509  -0.402  -0.239  0.000 0.214 0.342 0.411 0.469 0.519
            8 -0.635  -0.524  -0.481  -0.395  -0.239  0.000 0.210 0.330 0.403 0.462 0.512
          </tableData>
        </table>
      </function>
    </fcs_function>

    <fcs_function name="aero/data/force-lift-stab">
      <function>
        <product>
          <property>aero/qbar-psf</property>
          <property>metrics/Sh-sqft</property>
          <sum>
            <property>aero/data/clstab</property>
            <property>aero/data/clelev</property>
          </sum>
        </product>
      </function>
      <output>external_reactions/stabilizer-lift/magnitude</output>
    </fcs_function>

    <fcs_function name="aero/data/alpha-tail-rad">
      <function>
        <product>
          <difference>
            <property>aero/data/alh</property>
            <property>fcs/stab</property>
          </difference>
          <value>0.017453293</value>
        </product>
      </function>
    </fcs_function>

    <fcs_function name="aero/data/force-lift-stab-x">
      <function>
        <sin>
          <property>aero/data/alpha-tail-rad</property>
        </sin>
      </function>
      <output>external_reactions/stabilizer-lift/x</output>
    </fcs_function>

    <fcs_function name="aero/data/force-lift-stab-z">
      <function>
        <product>
          <cos>
            <property>aero/data/alpha-tail-rad</property>
          </cos>
          <value>-1</value>
        </product>
      </function>
      <output>external_reactions/stabilizer-lift/z</output>
    </fcs_function>

  </channel>

 </flight_control>

  <external_reactions>

    <force name="stabilizer-lift" frame="BODY">
      <location unit="IN">
        <x> 2265.72 </x>
        <y>    0    </y>
        <z>   57.12 </z>
      </location>
      <direction>
        <x>    0 </x>
        <y>    0 </y>
        <z>    0 </z>
      </direction>
    </force>

  </external_reactions>

 <aerodynamics>

  <axis name="LIFT">

    <function name="aero/force/Lift_alpha">
      <description>Lift due to alpha</description>
      <product>
          <property>aero/qbar-psf</property>
          <property>metrics/Sw-sqft</property>
          <table>
            <independentVar lookup="row">aero/alpha-rad</independentVar>
            <independentVar lookup="column">fcs/flap-pos-deg</independentVar>
            <tableData>
                      0       1       5     15    20    25    30
              -0.0698 -0.133  -0.202  0.104 0.232 0.377 0.544 0.767
              -0.0524 -0.052  -0.119  0.195 0.325 0.473 0.651 0.864
              -0.0349 0.029   -0.031  0.286 0.416 0.569 0.751 0.956
              -0.0175 0.109   0.058 0.376 0.507 0.664 0.846 1.044
              0 0.191 0.148   0.463 0.599 0.758 0.939 1.129
              0.0175  0.28    0.238 0.551 0.688 0.85  1.03  1.21
              0.0524  0.459   0.416 0.723 0.861 1.032 1.205 1.37
              0.0873  0.636   0.597 0.892 1.033 1.206 1.373 1.531
              0.1222  0.81    0.776 1.058 1.202 1.372 1.534 1.686
              0.1396  0.892   0.864 1.141 1.287 1.452 1.616 1.763
              0.1571  0.972   0.95  1.226 1.37  1.531 1.697 1.841
              0.1745  1.048 1.034 1.309 1.451 1.608 1.778 1.92
              0.192   1.109 1.115 1.391 1.531 1.685 1.859 1.998
              0.2094  1.134 1.194 1.471 1.608 1.761 1.938 2.077
              0.2269  1.131 1.27  1.549 1.684 1.833 2.014 2.156
              0.2443  1.139 1.345 1.626 1.757 1.903 2.089 2.235
              0.2618  1.14  1.415 1.7 1.825 1.97  2.164 2.31
              0.2793  1.112 1.481 1.769 1.891 2.031 2.237 2.379
              0.2967  1.067 1.542 1.833 1.951 2.083 2.303 2.438
              0.3142  1.016 1.599 1.885 2.001 2.112 2.36  2.481
              0.3316  1.011 1.642 1.907 1.996 2.089 2.394 2.497
              0.3491  1.02  1.639 1.865 1.906 1.985 2.383 2.473
              0.3665  1.027 1.581 1.749 1.78  1.862 2.335 2.404
              0.384   1.019 1.509 1.619 1.658 1.759 2.253 2.285
              0.4014  1.016 1.45  1.532 1.563 1.671 2.155 2.134
              0.4189  1.021 1.397 1.471 1.492 1.601 2.07  2.015
              0.4363  1.03  1.357 1.424 1.445 1.541 2.012 1.958
              0.4538  1.04  1.324 1.395 1.42  1.498 1.967 1.925
              0.4712  1.048 1.297 1.38  1.411 1.483 1.922 1.902
              0.4887  1.055 1.279 1.373 1.405 1.483 1.879 1.893
              0.5061  1.061 1.271 1.367 1.395 1.476 1.835 1.878
              0.5236  1.064 1.269 1.356 1.379 1.455 1.789 1.832
              0.5585  1.057 1.26  1.321 1.339 1.401 1.672 1.724
              0.5934  1.048 1.235 1.273 1.293 1.333 1.533 1.592
              0.6283  1.043 1.204 1.228 1.24  1.263 1.389 1.447
            </tableData>
          </table>
      </product>
    </function>

    <function name="aero/force/dLift_alpha_mach">
      <description>Delta lift due to alpha and mach number</description>
      <product>
          <property>aero/qbar-psf</property>
          <property>metrics/Sw-sqft</property>
          <table>
            <independentVar lookup="row">aero/alpha-rad</independentVar>
            <independentVar lookup="column">velocities/mach</independentVar>
            <tableData>
                      0.4 0.6 0.7 0.75  0.8 0.83  0.85  0.87  0.89  0.91  0.94  0.96
              -0.0698 0 -0.055  -0.084  -0.086  -0.088  -0.096  -0.1  -0.106  -0.124  -0.136  -0.186  -0.193
              -0.0524 0 -0.038  -0.06 -0.061  -0.062  -0.069  -0.081  -0.092  -0.105  -0.129  -0.186  -0.198
              -0.0349 0 -0.021  -0.037  -0.033  -0.035  -0.035  -0.043  -0.054  -0.071  -0.105  -0.172  -0.189
              -0.0175 0 -0.007  -0.012  -0.007  -0.003  0.002 0.003 0.005 -0.019  -0.063  -0.15 -0.18
              0       0 0.007 0.011 0.018 0.028 0.04  0.05  0.054 0.033 -0.015  -0.121  -0.165
              0.0175  0 0.013 0.027 0.04  0.058 0.077 0.09  0.096 0.082 0.022 -0.091  -0.147
              0.0524  0  0.027 0.06  0.083 0.131 0.192 0.198 0.168 0.118 0.067 -0.041  -0.085
              0.0873  0 0.035 0.078 0.154 0.214 0.21  0.166 0.146 0.088 0.056 -0.009  -0.044
              0.1222  0 0.011 0.026 0.054 0.097 0.075 0.067 0.033 0.003 0.007 0.005 0.001
              0.1396  0 -0.025  -0.03 -0.025  -0.007  -0.016  -0.013  -0.043  -0.054  -0.031  0.008 0.027
              0.1571  0 -0.068  -0.098  -0.108  -0.121  -0.131  -0.117  -0.126  -0.111  -0.065  0.002 0.035
              0.1745  0 -0.114  -0.163  -0.184  -0.201  -0.227  -0.225  -0.209  -0.177  -0.118  -0.015  0.036
              0.192   0 -0.153  -0.216  -0.244  -0.262  -0.298  -0.3  -0.276  -0.237  -0.166  -0.031  0.039
              0.2094  0 -0.166  -0.235  -0.267  -0.284  -0.32 -0.324  -0.307  -0.265  -0.185  -0.021  0.06
              0.2269  0 -0.155  -0.231  -0.262  -0.278  -0.312  -0.313  -0.31 -0.275  -0.176  0.007 0.096
              0.2443  0 -0.158  -0.238  -0.267  -0.281  -0.312  -0.311  -0.322  -0.284  -0.181  0.021 0.105
            </tableData>
          </table>
      </product>
    </function>

    <function name="aero/force/dLift_flaperon_left">
      <description>Delta lift due to left flaperon deflection</description>
      <product>
          <property>aero/qbar-psf</property>
          <property>metrics/Sw-sqft</property>
          <table>
            <independentVar lookup="row">aero/alpha-rad</independentVar>
            <independentVar lookup="column">fcs/flaperon-left</independentVar>
            <independentVar lookup="table">fcs/flap-pos-deg</independentVar>
            <tableData breakPoint="0">
                      -10     0       10      20      25      30      36
              -0.0698 -0.0190 0.0000  0.0180  0.0240  0.0310  0.0360  0.0360
              0.1047  -0.0170 0.0000  0.0170  0.0280  0.0330  0.0380  0.0380
              0.1396  -0.0160 0.0000  0.0150  0.0240  0.0290  0.0340  0.0340
              0.1745  -0.0120 0.0000  0.0110  0.0190  0.0210  0.0230  0.0230
              0.3142  0.0000  0.0000  0.0000  0.0000  0.0000  0.0000  0.0000
            </tableData>
            <tableData breakPoint="1">
                      -10     0       10      20      25      30      36
              -0.0698 -0.0180 0.0000  0.0180  0.0240  0.0310  0.0360  0.0360
              0.1745  -0.0170 0.0000  0.0170  0.0320  0.0370  0.0410  0.0400
              0.2443  -0.0170 0.0000  0.0160  0.0300  0.0360  0.0380  0.0380
              0.3491  -0.0080 0.0000  0.0070  0.0100  0.0100  0.0100  0.0100
              0.4538  0.0000  0.0000  0.0000  0.0000  0.0000  0.0000  0.0000
            </tableData>
            <tableData breakPoint="20">
                      -10     0       10      20      25      30      36
              -0.0698 -0.0200 0.0000  0.0140  0.0240  0.0290  0.0320  0.0330
              0.1745  -0.0190 0.0000  0.0150  0.0290  0.0320  0.0340  0.0350
              0.2443  -0.0200 0.0000  0.0130  0.0260  0.0300  0.0330  0.0340
              0.3491  -0.0080 0.0000  0.0050  0.0090  0.0100  0.0100  0.0100
              0.4538  0.0000  0.0000  0.0000  0.0000  0.0000  0.0000  0.0000
            </tableData>
            <tableData breakPoint="30">
                      -10     0       10      20      25      30      36
              -0.0698 -0.0200 0.0000  0.0140  0.0250  0.0310  0.0340  0.0350
              0.1745  -0.0200 0.0000  0.0150  0.0290  0.0350  0.0370  0.0380
              0.2443  -0.0200 0.0000  0.0130  0.0270  0.0320  0.0350  0.0370
              0.3491  -0.0090 0.0000  0.0050  0.0100  0.0110  0.0120  0.0120
              0.4538  0.0000  0.0000  0.0000  0.0000  0.0000  0.0000  0.0000
            </tableData>
          </table>
      </product>
    </function>

    <function name="aero/force/dLift_flaperon_right">
      <description>Delta lift due to right flaperon deflection</description>
      <product>
          <property>aero/qbar-psf</property>
          <property>metrics/Sw-sqft</property>
          <table>
            <independentVar lookup="row">aero/alpha-rad</independentVar>
            <independentVar lookup="column">fcs/flaperon-right</independentVar>
            <independentVar lookup="table">fcs/flap-pos-deg</independentVar>
            <tableData breakPoint="0">
                      -10     0       10      20      25      30      36
              -0.0698 -0.0190 0.0000  0.0180  0.0240  0.0310  0.0360  0.0360
              0.1047  -0.0170 0.0000  0.0170  0.0280  0.0330  0.0380  0.0380
              0.1396  -0.0160 0.0000  0.0150  0.0240  0.0290  0.0340  0.0340
              0.1745  -0.0120 0.0000  0.0110  0.0190  0.0210  0.0230  0.0230
              0.3142  0.0000  0.0000  0.0000  0.0000  0.0000  0.0000  0.0000
            </tableData>
            <tableData breakPoint="1">
                      -10     0       10      20      25      30      36
              -0.0698 -0.0180 0.0000  0.0180  0.0240  0.0310  0.0360  0.0360
              0.1745  -0.0170 0.0000  0.0170  0.0320  0.0370  0.0410  0.0400
              0.2443  -0.0170 0.0000  0.0160  0.0300  0.0360  0.0380  0.0380
              0.3491  -0.0080 0.0000  0.0070  0.0100  0.0100  0.0100  0.0100
              0.4538  0.0000  0.0000  0.0000  0.0000  0.0000  0.0000  0.0000
            </tableData>
            <tableData breakPoint="20">
                      -10     0       10      20      25      30      36
              -0.0698 -0.0200 0.0000  0.0140  0.0240  0.0290  0.0320  0.0330
              0.1745  -0.0190 0.0000  0.0150  0.0290  0.0320  0.0340  0.0350
              0.2443  -0.0200 0.0000  0.0130  0.0260  0.0300  0.0330  0.0340
              0.3491  -0.0080 0.0000  0.0050  0.0090  0.0100  0.0100  0.0100
              0.4538  0.0000  0.0000  0.0000  0.0000  0.0000  0.0000  0.0000
            </tableData>
            <tableData breakPoint="30">
                      -10     0       10      20      25      30      36
              -0.0698 -0.0200 0.0000  0.0140  0.0250  0.0310  0.0340  0.0350
              0.1745  -0.0200 0.0000  0.0150  0.0290  0.0350  0.0370  0.0380
              0.2443  -0.0200 0.0000  0.0130  0.0270  0.0320  0.0350  0.0370
              0.3491  -0.0090 0.0000  0.0050  0.0100  0.0110  0.0120  0.0120
              0.4538  0.0000  0.0000  0.0000  0.0000  0.0000  0.0000  0.0000
            </tableData>
          </table>
      </product>
    </function>

  </axis>

  <axis name="DRAG">

    <function name="aero/force/Drag_basic">
       <description>Drag basic</description>
       <product>
          <property>aero/qbar-psf</property>
          <property>metrics/Sw-sqft</property>
          <table>
            <independentVar lookup="row">aero/alpha-rad</independentVar>
            <independentVar lookup="column">fcs/flap-pos-deg</independentVar>
            <tableData>
                      0       1       5       15      20      25      30
              -0.0698 0.0131  0.0453  0.0406  0.0406  0.0482  0.1027  0.1423
              -0.0524 0.0117  0.0360  0.0342  0.0361  0.0468  0.0984  0.1410
              -0.0349 0.0112  0.0288  0.0299  0.0347  0.0477  0.0969  0.1414
              -0.0175 0.0116  0.0235  0.0283  0.0356  0.0508  0.0994  0.1433
              0.0000  0.0126  0.0206  0.0294  0.0390  0.0559  0.1037  0.1463
              0.0175  0.0149  0.0195  0.0318  0.0432  0.0616  0.1095  0.1523
              0.0349  0.0174  0.0205  0.0363  0.0485  0.0687  0.1170  0.1597
              0.0524  0.0207  0.0229  0.0407  0.0537  0.0758  0.1245  0.1671
              0.0698  0.0248  0.0270  0.0465  0.0607  0.0841  0.1333  0.1771
              0.0873  0.0300  0.0310  0.0526  0.0679  0.0923  0.1421  0.1872
              0.1047  0.0365  0.0365  0.0595  0.0759  0.1016  0.1523  0.1985
              0.1222  0.0433  0.0419  0.0671  0.0845  0.1112  0.1625  0.2098
              0.1396  0.0513  0.0488  0.0754  0.0939  0.1211  0.1737  0.2225
              0.1571  0.0594  0.0568  0.0842  0.1038  0.1321  0.1865  0.2359
              0.1745  0.0691  0.0654  0.0937  0.1143  0.1436  0.1997  0.2500
              0.1920  0.0814  0.0745  0.1045  0.1264  0.1573  0.2150  0.2650
              0.2094  0.1084  0.0851  0.1171  0.1397  0.1719  0.2307  0.2805
              0.2269  0.1435  0.0966  0.1312  0.1537  0.1878  0.2470  0.2969
              0.2443  0.1968  0.1090  0.1461  0.1691  0.2049  0.2645  0.3139
              0.2618  0.2464  0.1219  0.1628  0.1859  0.2220  0.2822  0.3320
              0.2793  0.2853  0.1361  0.1799  0.2035  0.2402  0.3007  0.3505
              0.2967  0.3096  0.1521  0.1974  0.2211  0.2600  0.3210  0.3690
              0.3142  0.3253  0.1677  0.2171  0.2403  0.2826  0.3420  0.3861
              0.3316  0.3348  0.1891  0.2399  0.2687  0.3240  0.3634  0.4056
              0.3491  0.3582  0.2253  0.3075  0.3737  0.4250  0.3887  0.4299
              0.3665  0.3878  0.2854  0.3723  0.4301  0.4992  0.4157  0.4669
              0.3840  0.4043  0.3170  0.3982  0.4789  0.5361  0.4499  0.5112
              0.4014  0.4251  0.3458  0.4314  0.4968  0.5564  0.4815  0.5214
              0.4189  0.4514  0.3804  0.4714  0.5173  0.5784  0.5146  0.5375
              0.4363  0.4784  0.4181  0.5150  0.5476  0.6034  0.5500  0.5669
              0.4538  0.5064  0.4557  0.5586  0.5778  0.6284  0.5855  0.5963
              0.4712  0.5333  0.4945  0.5975  0.6122  0.6575  0.6225  0.6327
              0.4887  0.5585  0.5332  0.6363  0.6466  0.6865  0.6595  0.6690
              0.5061  0.5863  0.5651  0.6647  0.6739  0.7113  0.6955  0.7081
              0.5236  0.6104  0.5969  0.6932  0.7013  0.7360  0.7315  0.7472
              0.5585  0.6614  0.6500  0.7403  0.7466  0.7800  0.8056  0.8248
              0.5934  0.7115  0.6993  0.7854  0.7929  0.8231  0.8787  0.8894
              0.6283  0.7615  0.7470  0.8294  0.8387  0.8645  0.9439  0.9437
            </tableData>
          </table>
       </product>
    </function>

    <function name="aero/force/Drag_mach">
       <description>Drag due to mach</description>
        <product>
          <property>aero/qbar-psf</property>
          <property>metrics/Sw-sqft</property>
          <table>
            <independentVar lookup="row">aero/alpha-rad</independentVar>
            <independentVar lookup="column">velocities/mach</independentVar>
            <tableData>
                      0.4     0.6     0.7     0.75    0.8     0.83    0.85    0.87    0.89    0.91    0.94    0.96
              -0.0698 0.0000  0.0026  0.0046  0.0063  0.0095  0.0126  0.0157  0.0199  0.0270  0.0351  0.0513  0.0628
              -0.0524 0.0000  0.0015  0.0029  0.0038  0.0053  0.0068  0.0087  0.0125  0.0176  0.0243  0.0416  0.0548
              -0.0349 0.0000  0.0011  0.0018  0.0023  0.0028  0.0041  0.0052  0.0080  0.0113  0.0172  0.0350  0.0484
              -0.0175 0.0000  0.0007  0.0012  0.0014  0.0016  0.0015  0.0025  0.0045  0.0079  0.0135  0.0307  0.0414
              0.0000  0.0000  0.0009  0.0013  0.0013  0.0011  0.0011  0.0023  0.0040  0.0078  0.0130  0.0286  0.0352
              0.0175  0.0000  0.0012  0.0016  0.0015  0.0016  0.0020  0.0033  0.0058  0.0113  0.0172  0.0281  0.0324
              0.0349  0.0000  0.0023  0.0030  0.0030  0.0037  0.0055  0.0085  0.0152  0.0210  0.0262  0.0313  0.0332
              0.0524  0.0000  0.0031  0.0051  0.0054  0.0081  0.0153  0.0231  0.0298  0.0342  0.0392  0.0423  0.0438
              0.0698  0.0000  0.0041  0.0086  0.0108  0.0205  0.0323  0.0424  0.0447  0.0488  0.0553  0.0748  0.0849
              0.0873  0.0000  0.0061  0.0153  0.0202  0.0351  0.0482  0.0598  0.0590  0.0644  0.1024  0.1520  0.1818
              0.1047  0.0000  0.0110  0.0257  0.0338  0.0489  0.0629  0.0750  0.0721  0.0815  0.1683  0.2688  0.3312
              0.1222  0.0000  0.0204  0.0407  0.0496  0.0628  0.0772  0.0897  0.0889  0.1046  0.2301  0.4150  0.5420
              0.1396  0.0000  0.0366  0.0548  0.0640  0.0755  0.0904  0.1050  0.1059  0.1276  0.2909  0.5601  0.7402
              0.1571  0.0000  0.0525  0.0693  0.0776  0.0882  0.1035  0.1202  0.1229  0.1505  0.3516  0.6809  0.9181
              0.1745  0.0000  0.0683  0.0835  0.0895  0.0992  0.1150  0.1337  0.1383  0.1718  0.4107  0.8041  1.0821
              0.1920  0.0000  0.0828  0.0945  0.0987  0.1076  0.1239  0.1446  0.1510  0.1904  0.4711  0.9248  1.2402
              0.2094  0.0000  0.0816  0.0893  0.0933  0.1013  0.1180  0.1408  0.1490  0.1942  0.5168  1.0307  1.3840
              0.2269  0.0000  0.0718  0.0765  0.0799  0.0870  0.1042  0.1290  0.1390  0.1902  0.5416  1.1286  1.5280
              0.2443  0.0000  0.0432  0.0455  0.0481  0.0544  0.0720  0.0989  0.1107  0.1678  0.5480  1.2082  1.6537
            </tableData>
          </table>
        </product>
    </function>

    <function name="aero/force/Drag_gear">
       <description>Drag due to gear</description>
         <product>
           <property>aero/qbar-psf</property>
           <property>metrics/Sw-sqft</property>
           <property>gear/gear-pos-norm</property>
           <value>0.03</value>
         </product>
    </function>

    <function name="aero/force/Drag_speedbrake">
       <description>Drag due to speedbrakes</description>
         <product>
           <property>aero/qbar-psf</property>
           <property>metrics/Sw-sqft</property>
           <property>fcs/speedbrake-pos-norm</property>
           <value>0.024</value>
         </product>
    </function>

    <function name="aero/force/Drag_beta">
       <description>Drag due to sideslip</description>
       <product>
          <property>aero/qbar-psf</property>
          <property>metrics/Sw-sqft</property>
          <table>
            <independentVar lookup="row">aero/beta-rad</independentVar>
            <tableData>
              -1.57    1.230
              -0.26    0.050
               0.00    0.000
               0.26    0.050
               1.57    1.230
            </tableData>
          </table>
       </product>
    </function>

  </axis>

  <axis name="SIDE">

    <function name="aero/force/Side_beta">
       <description>Side force due to beta</description>
       <product>
           <property>aero/qbar-psf</property>
           <property>metrics/Sw-sqft</property>
           <property>aero/beta-rad</property>
           <value>-1</value>
       </product>
    </function>

  </axis>

  <axis name="ROLL">

    <function name="aero/moment/Roll_beta">
       <description>Roll moment due to beta</description>
       <product>
           <property>aero/qbar-psf</property>
           <property>metrics/Sw-sqft</property>
           <property>metrics/bw-ft</property>
           <property>aero/beta-rad</property>
           <value>-0.1</value>
       </product>
    </function>

    <function name="aero/moment/Roll_damp">
       <description>Roll moment due to roll rate</description>
       <product>
           <property>aero/qbar-psf</property>
           <property>metrics/Sw-sqft</property>
           <property>metrics/bw-ft</property>
           <property>aero/bi2vel</property>
           <property>velocities/p-aero-rad_sec</property>
           <value>-0.4</value>
       </product>
    </function>

    <function name="aero/moment/Roll_yaw">
       <description>Roll moment due to yaw rate</description>
       <product>
           <property>aero/qbar-psf</property>
           <property>metrics/Sw-sqft</property>
           <property>metrics/bw-ft</property>
           <property>aero/bi2vel</property>
           <property>velocities/r-aero-rad_sec</property>
           <value>0.15</value>
       </product>
    </function>

    <function name="aero/moment/Roll_aileron">
       <description>Roll moment due to aileron</description>
       <product>
          <property>aero/qbar-psf</property>
          <property>metrics/Sw-sqft</property>
          <property>metrics/bw-ft</property>
          <property>fcs/left-aileron-pos-rad</property>
          <value>0.17</value>
       </product>
    </function>

    <function name="aero/moment/Roll_rudder">
       <description>Roll moment due to rudder</description>
       <product>
           <property>aero/qbar-psf</property>
           <property>metrics/Sw-sqft</property>
           <property>metrics/bw-ft</property>
           <property>fcs/rudder-pos-rad</property>
           <value>0.01</value>
       </product>
    </function>

  </axis>

  <axis name="PITCH">

    <function name="aero/moment/Pitch_alpha">
       <description>Pitch moment due to alpha</description>
       <product>
          <property>aero/qbar-psf</property>
          <property>metrics/Sw-sqft</property>
          <property>metrics/cbarw-ft</property>
          <table>
            <independentVar lookup="row">aero/alpha-rad</independentVar>
            <independentVar lookup="column">fcs/flap-pos-deg</independentVar>
            <tableData>
                0 1 5 15  20  25  30
              -0.0698 -0.089  -0.086  -0.205  -0.268  -0.354  -0.414  -0.501
              -0.0524 -0.088  -0.083  -0.206  -0.274  -0.361  -0.421  -0.506
              -0.0349 -0.087  -0.080  -0.209  -0.280  -0.366  -0.425  -0.511
              -0.0175 -0.087  -0.079  -0.211  -0.285  -0.370  -0.428  -0.514
              0.0000  -0.087  -0.080  -0.214  -0.290  -0.373  -0.430  -0.515
              0.0175  -0.087  -0.080  -0.216  -0.292  -0.375  -0.430  -0.514
              0.0349  -0.087  -0.081  -0.218  -0.293  -0.376  -0.429  -0.513
              0.0524  -0.087  -0.081  -0.219  -0.294  -0.376  -0.427  -0.509
              0.0698  -0.087  -0.081  -0.220  -0.294  -0.375  -0.425  -0.505
              0.0873  -0.087  -0.081  -0.220  -0.294  -0.374  -0.423  -0.502
              0.1047  -0.087  -0.081  -0.221  -0.294  -0.372  -0.421  -0.501
              0.1222  -0.087  -0.080  -0.222  -0.293  -0.369  -0.420  -0.500
              0.1396  -0.086  -0.080  -0.224  -0.293  -0.365  -0.418  -0.500
              0.1571  -0.085  -0.079  -0.225  -0.292  -0.360  -0.416  -0.498
              0.1745  -0.078  -0.077  -0.226  -0.291  -0.355  -0.414  -0.498
              0.1920  -0.049  -0.076  -0.226  -0.287  -0.351  -0.412  -0.500
              0.2094  0.011 -0.076  -0.227  -0.288  -0.349  -0.412  -0.504
              0.2269  0.045 -0.075  -0.230  -0.293  -0.351  -0.413  -0.509
              0.2443  0.058 -0.076  -0.231  -0.297  -0.355  -0.414  -0.517
              0.2618  0.061 -0.077  -0.227  -0.294  -0.359  -0.417  -0.525
              0.2793  0.046 -0.078  -0.220  -0.283  -0.355  -0.424  -0.528
              0.2967  -0.040  -0.079  -0.209  -0.269  -0.331  -0.435  -0.526
              0.3142  -0.138  -0.077  -0.190  -0.248  -0.286  -0.444  -0.493
              0.3316  -0.122  -0.072  -0.164  -0.218  -0.231  -0.428  -0.447
              0.3491  -0.058  -0.074  -0.144  -0.178  -0.191  -0.381  -0.398
              0.3665  0.026 -0.121  -0.189  -0.148  -0.190  -0.334  -0.365
              0.3840  0.114 -0.192  -0.255  -0.157  -0.211  -0.323  -0.387
              0.4014  0.152 -0.173  -0.239  -0.168  -0.221  -0.356  -0.437
              0.4189  0.181 -0.124  -0.182  -0.173  -0.227  -0.420  -0.478
              0.4363  0.202 -0.063  -0.136  -0.176  -0.225  -0.467  -0.503
              0.4538  0.224 -0.001  -0.096  -0.175  -0.216  -0.477  -0.498
              0.4712  0.243 0.066 -0.059  -0.170  -0.192  -0.466  -0.478
              0.4887  0.253 0.118 -0.021  -0.158  -0.159  -0.437  -0.447
              0.5061  0.261 0.158 0.018 -0.133  -0.118  -0.395  -0.410
              0.5236  0.273 0.192 0.053 -0.092  -0.079  -0.332  -0.347
              0.5411  0.283 0.219 0.083 -0.047  -0.040  -0.256  -0.270
              0.5585  0.292 0.238 0.107 -0.010  -0.006  -0.180  -0.192
              0.5760  0.299 0.251 0.128 0.031 0.026 -0.104  -0.113
              0.5934  0.306 0.257 0.146 0.067 0.057 -0.041  -0.047
              0.6109  0.313 0.261 0.160 0.089 0.083 -0.012  -0.014
              0.6283  0.320 0.265 0.171 0.105 0.101 0.012 0.011
            </tableData>
          </table>
       </product>
    </function>

    <function name="aero/moment/dPitch_alpha_mach">
       <description>Pitch moment due to mach</description>
       <product>
          <property>aero/qbar-psf</property>
          <property>metrics/Sw-sqft</property>
          <property>metrics/cbarw-ft</property>
          <table>
            <independentVar lookup="row">aero/alpha-rad</independentVar>
            <independentVar lookup="column">velocities/mach</independentVar>
            <tableData>
                0.4 0.6 0.7 0.75  0.8 0.83  0.85  0.87  0.89  0.91  0.94  0.96
              -0.0698 0.000 -0.017  -0.026  -0.025  -0.022  -0.023  -0.021  -0.014  -0.011  0.001 0.030 0.045
              -0.0524 0.000 -0.018  -0.026  -0.026  -0.023  -0.024  -0.021  -0.014  -0.009  0.005 0.032 0.048
              -0.0349 0.000 -0.019  -0.028  -0.028  -0.025  -0.027  -0.026  -0.017  -0.011  0.004 0.032 0.050
              -0.0175 0.000 -0.021  -0.031  -0.033  -0.032  -0.035  -0.034  -0.026  -0.018  -0.004  0.032 0.050
              0.0000  0.000 -0.023  -0.036  -0.039  -0.043  -0.050  -0.058  -0.061  -0.053  -0.027  0.030 0.048
              0.0175  0.000 -0.025  -0.041  -0.047  -0.056  -0.069  -0.084  -0.102  -0.094  -0.053  0.022 0.034
              0.0349  0.000 -0.026  -0.048  -0.055  -0.062  -0.089  -0.104  -0.124  -0.105  -0.063  -0.029  -0.022
              0.0524  0.000 -0.025  -0.051  -0.058  -0.064  -0.114  -0.117  -0.123  -0.102  -0.064  -0.057  -0.064
              0.0698  0.000 -0.023  -0.050  -0.058  -0.064  -0.112  -0.106  -0.106  -0.087  -0.063  -0.071  -0.086
              0.0873  0.000 -0.017  -0.042  -0.049  -0.056  -0.074  -0.075  -0.065  -0.064  -0.056  -0.090  -0.115
              0.1047  0.000 0.000 -0.004  -0.011  -0.020  -0.019  -0.020  -0.012  -0.039  -0.033  -0.109  -0.147
              0.1222  0.000 0.029 0.025 0.020 0.019 0.037 0.030 0.045 -0.006  -0.009  -0.129  -0.176
              0.1396  0.000 0.058 0.039 0.043 0.046 0.053 0.065 0.078 0.021 0.003 -0.147  -0.194
              0.1571  0.000 0.074 0.043 0.045 0.049 0.048 0.062 0.081 0.023 -0.001  -0.159  -0.204
              0.1745  0.000 0.064 0.030 0.033 0.035 0.027 0.039 0.062 0.004 -0.030  -0.173  -0.217
              0.1920  0.000 0.029 -0.013  -0.008  -0.012  -0.021  -0.012  0.017 -0.046  -0.093  -0.207  -0.254
              0.2094  0.000 -0.040  -0.087  -0.085  -0.090  -0.098  -0.095  -0.060  -0.126  -0.185  -0.270  -0.320
              0.2269  0.000 -0.085  -0.134  -0.134  -0.141  -0.151  -0.147  -0.107  -0.181  -0.241  -0.305  -0.360
              0.2443  0.000 -0.112  -0.161  -0.165  -0.170  -0.184  -0.178  -0.132  -0.214  -0.269  -0.320  -0.378
            </tableData>
          </table>
       </product>
    </function>


    <function name="aero/moment/Pitch_damp">
       <description>Pitch moment due to pitch rate</description>
       <product>
           <property>aero/qbar-psf</property>
           <property>metrics/Sw-sqft</property>
           <property>metrics/cbarw-ft</property>
           <property>aero/ci2vel</property>
           <property>velocities/q-aero-rad_sec</property>
           <value>-12</value>
       </product>
    </function>

    <function name="aero/moment/Pitch_alphadot">
       <description>Pitch moment due to alpha rate</description>
       <product>
           <property>aero/qbar-psf</property>
           <property>metrics/Sw-sqft</property>
           <property>metrics/cbarw-ft</property>
           <property>aero/ci2vel</property>
           <property>aero/alphadot-rad_sec</property>
           <value>-7</value>
       </product>
    </function>

  </axis>

  <axis name="YAW">

    <function name="aero/moment/Yaw_beta">
       <description>Yaw moment due to beta</description>
       <product>
           <property>aero/qbar-psf</property>
           <property>metrics/Sw-sqft</property>
           <property>metrics/bw-ft</property>
           <property>aero/beta-rad</property>
           <value>0.12</value>
       </product>
    </function>

    <function name="aero/moment/Yaw_damp">
       <description>Yaw moment due to yaw rate</description>
       <product>
           <property>aero/qbar-psf</property>
           <property>metrics/Sw-sqft</property>
           <property>metrics/bw-ft</property>
           <property>aero/bi2vel</property>
           <property>velocities/r-aero-rad_sec</property>
           <value>-0.15</value>
       </product>
    </function>

    <function name="aero/moment/Yaw_rudder">
       <description>Yaw moment due to rudder</description>
       <product>
           <property>aero/qbar-psf</property>
           <property>metrics/Sw-sqft</property>
           <property>metrics/bw-ft</property>
           <property>fcs/rudder-pos-rad</property>
           <value>-0.1</value>
       </product>
    </function>

    <function name="aero/moment/Yaw_aileron">
       <description>Adverse yaw</description>
       <product>
           <property>aero/qbar-psf</property>
           <property>metrics/Sw-sqft</property>
           <property>metrics/bw-ft</property>
           <property>fcs/left-aileron-pos-rad</property>
           <value>-0.01</value>
       </product>
    </function>

  </axis>
 </aerodynamics>

    <!--<output name="772-data.csv" type="CSV" rate="1">
        <simulation> OFF </simulation>
        <atmosphere> OFF </atmosphere>
        <massprops> OFF </massprops>
        <aerosurfaces> OFF </aerosurfaces>
        <rates> OFF </rates>
        <velocities> OFF </velocities>
        <forces> OFF </forces>
        <moments> OFF </moments>
        <position> OFF </position>
        <coefficients> OFF </coefficients>
        <ground_reactions> OFF </ground_reactions>
        <fcs> OFF </fcs>
        <propulsion> OFF </propulsion>
    <property>aero/data/alfad</property>
    <property>aero/data/albr</property>
    <property>aero/data/s-clwb</property>
    </output>-->

</fdm_config>
